c := 0.67
b := 4.7
n := 12
m := 8
k := 1, 2 .. m
l := 1, 2 .. m
ORIGIN := 1
f(i, j) := b + c*rnd(1)
x :=
    for i ∈ 1 .. n
        for j ∈ 1 .. m
            buf[i, j] ← f(i, j)
    return buf
x = [
    5.26387, 4.98641, 5.19238, 4.75477, 5.26747, 4.94095, 4.76325, 4.8262;
    5.31196, 4.90791, 4.92882, 4.88243, 4.81555, 4.74385, 5.34566, 4.99913;
    4.82011, 5.01631, 4.86658, 4.88589, 5.25104, 5.12204, 4.70483, 4.894;
    5.27583, 5.17402, 5.31709, 4.76269, 4.75139, 4.95719, 5.04511, 4.7943;
    4.74999, 5.3129, 5.20606, 4.76816, 5.15422, 5.25222, 4.8819, 5.28319;
    5.35042, 4.84785, 4.8371, 4.82925, 5.34104, 5.19498, 5.15549, 5.31729;
    5.26569, 4.77064, 5.30551, 5.29814, 5.34097, 4.92209, 5.29464, 4.9903;
    4.87896, 5.05366, 5.23206, 5.02608, 5.07455, 4.9326, 5.31054, 4.94688;
    4.84154, 4.73361, 4.86671, 4.79708, 5.10744, 4.83189, 5.21038, 5.12643;
    4.81688, 5.34534, 4.83237, 4.73171, 4.72415, 4.7552, 5.0812, 4.84665;
    4.90408, 4.97554, 4.86864, 5.04087, 5.36192, 4.78157, 5.17366, 4.89748;
    5.05182, 5.04653, 5.25557, 4.76945, 5.33427, 5.01753, 5.31564, 4.94475
]
M :=
    for k ∈ 1 .. m
        M[k] ← sum(x[i, k], i = 1 .. n)/n
    return M
M = [5.04426; 5.01423; 5.05908; 4.87888; 5.127; 4.95434; 5.10686; 4.98888]
j := 1 .. n
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D :=
    for k ∈ 1 .. m
        D[k] ← sum((x[i, k] - M[k])^2, i = 1 .. n)/(n - 1)
    return D
D = [0.053904; 0.0369371; 0.0421067; 0.0279729; 0.057192; 0.0281152; 0.0481526; 0.0290108]
d := 1 .. m
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σ :=
    for k ∈ 1 .. m
        σ[k] ← sqrt(D[k])
    return σ
    = [0.232172; 0.19219; 0.205199; 0.167251; 0.239148; 0.167676; 0.219437; 0.170325]
K :=
    for k ∈ 1 .. m
        for l ∈ 1 .. m
            K[k, l] ← sum((x[i, k] - M[k])*(x[i, l] - M[l]), i = 1 .. n)/(n - 1)
    return K
K = [
    0.053904, -0.0190952, 0.01189, 0.00523786, 0.000951367, -0.00172229, 0.0118493, -0.00169454;
    -0.0190952, 0.0369371, 0.00647526, -0.0156533, -0.022047, 0.00514879, -0.0157188, -0.00728903;
    0.01189, 0.00647526, 0.0421067, 0.00653998, 0.00270278, 0.00788784, 0.00330948, -0.00699997;
    0.00523786, -0.0156533, 0.00653998, 0.0279729, 0.015508, -0.00504256, 0.0147578, -0.00114542;
    0.000951367, -0.022047, 0.00270278, 0.015508, 0.057192, 0.0174898, -0.00438654, 0.0127335;
    -0.00172229, 0.00514879, 0.00788784, -0.00504256, 0.0174898, 0.0281152, -0.0168154, 0.0159637;
    0.0118493, -0.0157188, 0.00330948, 0.0147578, -0.00438654, -0.0168154, 0.0481526, 0.00477744;
    -0.00169454, -0.00728903, -0.00699997, -0.00114542, 0.0127335, 0.0159637, 0.00477744, 0.0290108
]
r :=
    for k ∈ 1 .. m
        for l ∈ 1 .. m
            r[k, l] ← K[k, l]/(σ[k]*σ[l])
    return r
r = [
    1, -0.42794, 0.249571, 0.134888, 0.0171344, -0.0442409, 0.23258, -0.0428511;
    -0.42794, 1, 0.164191, -0.486973, -0.479678, 0.159773, -0.372716, -0.222668;
    0.249571, 0.164191, 1, 0.19056, 0.0550766, 0.229252, 0.0734977, -0.200282;
    0.134888, -0.486973, 0.19056, 1, 0.387721, -0.17981, 0.402109, -0.0402085;
    0.0171344, -0.479678, 0.0550766, 0.387721, 1, 0.436161, -0.0835881, 0.312609;
    -0.0442409, 0.159773, 0.229252, -0.17981, 0.436161, 1, -0.457011, 0.558964;
    0.23258, -0.372716, 0.0734977, 0.402109, -0.0835881, -0.457011, 1, 0.127822;
    -0.0428511, -0.222668, -0.200282, -0.0402085, 0.312609, 0.558964, 0.127822, 1
]
