n := 4
c := 0.002*n
pi1 := [
    0.1 + c, 0.2 + c, 0.3 - c, 0.4 - c;
    0.2 + c, 0.2 - c, 0.3 + c, 0.3 - c;
    0.4 + c, 0.2 + c, 0.1 - c, 0.3 - c;
    0.5 + c, 0.2 + c, 0.2 - c, 0.1 - c
] = [
    0.108, 0.208, 0.292, 0.392;
    0.208, 0.192, 0.308, 0.292;
    0.408, 0.208, 0.092, 0.292;
    0.508, 0.208, 0.192, 0.092
]
pi(i) := pi1^i
P[0] := [0.2, 0.3, 0.4, 0.1]
P[1] := P[0]*pi(1) = [0.298, 0.2032, 0.2068, 0.292]
pi(2) = [
    0.3732, 0.204672, 0.197728, 0.2244;
    0.3364, 0.204928, 0.204272, 0.2544;
    0.2732, 0.204672, 0.247728, 0.2744;
    0.2232, 0.204672, 0.247728, 0.3244
]
P[2] := P[0]*pi(2) = [0.30716, 0.204749, 0.224691, 0.2634]
pi(4) = [
    0.312235, 0.204724, 0.220174, 0.262867;
    0.307071, 0.204724, 0.222003, 0.266201;
    0.299735, 0.204724, 0.225174, 0.270367;
    0.292235, 0.204724, 0.227674, 0.275367
]
P[4] := P[0]*pi(4) = [0.303686, 0.204724, 0.223472, 0.268117]
pi(8) = [
    0.303169, 0.204724, 0.223621, 0.268486;
    0.303079, 0.204724, 0.223655, 0.268542;
    0.302956, 0.204724, 0.223702, 0.268618;
    0.302825, 0.204724, 0.223752, 0.268699
]
P8 := P[0]*pi(8) = [0.303022, 0.204724, 0.223676, 0.268577]
Given
p0 := 0.2
p1 := 0.2
p2 := 0.2
p3 := 0.2
p0*pi1[0, 0] + p1*pi1[1, 0] + p2*pi1[2, 0] + p3*pi1[3, 0] == p0
p0*pi1[0, 1] + p1*pi1[1, 1] + p2*pi1[2, 1] + p3*pi1[3, 1] == p1
p0*pi1[0, 2] + p1*pi1[1, 2] + p2*pi1[2, 2] + p3*pi1[3, 2] == p2
p0 + p1 + p2 + p3 == 1
res := Find(p0, p1, p2, p3) = [0.30301; 0.204724; 0.223681; 0.268584]
s := sum(res[i], i = 0 .. 3) = 1
P[0] := [1, 0, 0, 0]
P[1] := P[0]*pi(1) = [0.108, 0.208, 0.292, 0.392]
pi(2) = [
    0.3732, 0.204672, 0.197728, 0.2244;
    0.3364, 0.204928, 0.204272, 0.2544;
    0.2732, 0.204672, 0.247728, 0.2744;
    0.2232, 0.204672, 0.247728, 0.3244
]
P[2] := P[0]*pi(2) = [0.3732, 0.204672, 0.197728, 0.2244]
pi(4) = [
    0.312235, 0.204724, 0.220174, 0.262867;
    0.307071, 0.204724, 0.222003, 0.266201;
    0.299735, 0.204724, 0.225174, 0.270367;
    0.292235, 0.204724, 0.227674, 0.275367
]
P[4] := P[0]*pi(4) = [0.312235, 0.204724, 0.220174, 0.262867]
pi(8) = [
    0.303169, 0.204724, 0.223621, 0.268486;
    0.303079, 0.204724, 0.223655, 0.268542;
    0.302956, 0.204724, 0.223702, 0.268618;
    0.302825, 0.204724, 0.223752, 0.268699
]
P8 := P[0]*pi(8) = [0.303169, 0.204724, 0.223621, 0.268486]
Given
p0 := 0.2
p1 := 0.2
p2 := 0.2
p3 := 0.2
p0*pi1[0, 0] + p1*pi1[1, 0] + p2*pi1[2, 0] + p3*pi1[3, 0] == p0
p0*pi1[0, 1] + p1*pi1[1, 1] + p2*pi1[2, 1] + p3*pi1[3, 1] == p1
p0*pi1[0, 2] + p1*pi1[1, 2] + p2*pi1[2, 2] + p3*pi1[3, 2] == p2
p0 + p1 + p2 + p3 == 1
res := Find(p0, p1, p2, p3) = [0.30301; 0.204724; 0.223681; 0.268584]
s := sum(res[i], i = 0 .. 3) = 1
