L := 5
Δt := 1
N := 4
λ := [
    100, 3 + 0.02*N, 4 + 0.01*N, 0;
    1.5 + 0.03*N, 100, 0, 2.5 + 0.02*N;
    3.5 + 0.01*N, 4.5 + 0.02*N, 100, 0;
    0, 5 - 0.02*N, 4 - 0.03*N, 100
] = [100, 3.08, 4.04, 0; 1.62, 100, 0, 2.58; 3.54, 4.58, 100, 0; 0, 4.92, 3.88, 100]
p1[1] := 0.2
p1[2] := 0.25
p1[3] := 0.3
p1[3] := 0.25
-sum(λ[1, j]*p[1], j = 2 .. 4) + sum(λ[i, 1]*p[i], i = 2 .. 4)
