n := 4
L := 30
delT := 2
l := [
    0, 3 + 0.02*n, 4 + 0.01*n, 0;
    1.5 + 0.03*n, 0, 0, 2.5 + 0.02*n;
    3.5 + 0.01*n, 4.5 + 0.02*n, 0, 0;
    0, 5 - 0.02*n, 4 - 0.03*n, 0
] = [0, 3.08, 4.04, 0; 1.62, 0, 0, 2.58; 3.54, 4.58, 0, 0; 0, 4.92, 3.88, 0]
p := [0.2; 0.25; 0.3; 0.25]
D(t, p) := [
    -l[0, 1]*p[0] - l[0, 2]*p[0] + l[1, 0]*p[1] + l[2, 0]*p[2];
    -l[1, 0]*p[1] - l[1, 3]*p[1] + l[0, 1]*p[0] + l[2, 1]*p[2] + l[3, 1]*p[3];
    -l[2, 0]*p[2] - l[2, 1]*p[2] + l[0, 2]*p[0] + l[3, 2]*p[3];
    -l[3, 1]*p[3] - l[3, 2]*p[3] + l[1, 3]*p[1]
]
z := rkfixed(p, 0, delT, L, D) = [
    0, 0.2, 0.25, 0.3, 0.25;
    0.0666667, 0.203562, 0.358489, 0.257674, 0.180274;
    0.133333, 0.205455, 0.417986, 0.22489, 0.151669;
    0.2, 0.205278, 0.450803, 0.202561, 0.141359;
    0.266667, 0.203902, 0.469073, 0.188297, 0.138729;
    0.333333, 0.202119, 0.47937, 0.179504, 0.139007;
    0.4, 0.200398, 0.48526, 0.174191, 0.140151;
    0.466667, 0.198944, 0.488685, 0.171013, 0.141359;
    0.533333, 0.197806, 0.490709, 0.169119, 0.142366;
    0.6, 0.19696, 0.491927, 0.167987, 0.143126
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]
Given
p0 := 0.2
p1 := 0.25
p2 := 0.3
p3 := 0.25
l[0, 1]*p0 + l[0, 2]*p0 + (l[0, 3]*p0) == l[1, 0]*p1 + l[2, 0]*p2 + l[3, 0]*p3
l[1, 0]*p1 + l[1, 2]*p1 + (l[1, 3]*p1) == l[0, 1]*p0 + l[2, 1]*p2 + l[3, 1]*p3
l[2, 0]*p2 + l[2, 1]*p2 + (l[2, 3]*p2) == l[0, 2]*p0 + l[1, 2]*p1 + l[3, 2]*p3
l[3, 0]*p3 + l[3, 1]*p3 + (l[3, 2]*p3) == l[0, 3]*p0 + l[1, 3]*p1 + l[2, 3]*p2
p0 + p1 + p2 + p3 == 1
res := Find(p0, p1, p2, p3) = [0.195031; 0.493928; 0.16623; 0.144811]
s := sum(res[i], i = 0 .. 3) = 1
p1 := [1; 0; 0; 0]
D1(t, p1) := [
    -l[0, 1]*p1[0] - l[0, 2]*p1[0] + l[1, 0]*p1[1] + l[2, 0]*p1[2];
    -l[1, 0]*p1[1] - l[1, 3]*p1[1] + l[0, 1]*p1[0] + l[2, 1]*p1[2] + l[3, 1]*p1[3];
    -l[2, 0]*p1[2] - l[2, 1]*p1[2] + l[0, 2]*p1[0] + l[3, 2]*p1[3];
    -l[3, 1]*p1[3] - l[3, 2]*p1[3] + l[1, 3]*p1[1]
]
f := rkfixed(p1, 0, delT, L, D1) = [
    0, 1, 0, 0, 0;
    0.0666667, 0.650955, 0.171603, 0.164421, 0.0130208;
    0.133333, 0.462698, 0.286461, 0.212504, 0.0383368;
    0.2, 0.357174, 0.361309, 0.217193, 0.0643237;
    0.266667, 0.295759, 0.409379, 0.208392, 0.0864702;
    0.333333, 0.2588, 0.440026, 0.197466, 0.103708;
    0.4, 0.235944, 0.459512, 0.188117, 0.116427;
    0.466667, 0.221515, 0.471903, 0.181091, 0.125492;
    0.533333, 0.212271, 0.479794, 0.176133, 0.131802;
    0.6, 0.206291, 0.484834, 0.172755, 0.136121
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]
Given
p0 := 1
p1 := 0
p2 := 0
p3 := 0
l[0, 1]*p0 + l[0, 2]*p0 + (l[0, 3]*p0) == l[1, 0]*p1 + l[2, 0]*p2 + l[3, 0]*p3
l[1, 0]*p1 + l[1, 2]*p1 + (l[1, 3]*p1) == l[0, 1]*p0 + l[2, 1]*p2 + l[3, 1]*p3
l[2, 0]*p2 + l[2, 1]*p2 + (l[2, 3]*p2) == l[0, 2]*p0 + l[1, 2]*p1 + l[3, 2]*p3
l[3, 0]*p3 + l[3, 1]*p3 + (l[3, 2]*p3) == l[0, 3]*p0 + l[1, 3]*p1 + l[2, 3]*p2
p0 + p1 + p2 + p3 == 1
res := Find(p0, p1, p2, p3) = [0.195031; 0.493928; 0.16623; 0.144811]
s := sum(res[i], i = 0 .. 3) = 1
p1 := [1; 0; 0; 0]
