n := 100
N := 4
m := 24
λ := 10*(N + 1)/(N + 4) = 6.25
T1 := N + 1 = 5
T2 := N + 4 = 8
tau := (T2 - T1)/m = 0.125
l :=
    for i ∈ 0 .. n - 1
        l[i] ← -(1/λ)*ln(rnd(1))
    return l
l = [
    1.0672; 0.262943; 0.0857813; 0.167831; 0.0311994; 0.279673; 0.0546868; 0.190524; 0.382782; 0.306431
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]
t :=
    for i ∈ 2 .. n
        t[i] ← sum(l[j], j = 0 .. i - 1)
    return t
t = [
    0; 0; 1.33014; 1.41592; 1.58375; 1.61495; 1.89463; 1.94931; 2.13984; 2.52262
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]
mint := t[19] = 5.02061
tt := T1
j := 19
maxt := t[44] = 7.91141
i := 0
k :=
    while tt < T2
        t1 ← tt + tau
        kj ← 0
        tj ← t[j]
        tj < t1
        while tj < t1
            kj ← kj + 1 if tj > tt and tj < t1
            j ← j + 1
            tj ← t[j]
        k[i] ← kj
        i ← i + 1
        tt ← t1
    return k
maxk := 0
kk := maxk
maxk :=
    for i ∈ 0 .. m - 1
        kk ← k[i] if k[i] > kk
    return kk
k = [1; 3; 1; 4; 1; 1; 1; 2; 0; 0; 0; 0; 0; 1; 0; 1; 2; 2; 1; 2; 2; 0; 0; 1]
maxk = 4
f :=
    for i ∈ 0 .. maxk
        kf ← 0
        for j ∈ 0 .. m - 1
            kf ← kf + 1 if i == k[j]
        f[i] ← kf
    return f
f = [8; 9; 5; 1; 1]
w :=
    for i ∈ 0 .. maxk
        w[i] ← f[i]/m
    return w
w = [0.333333; 0.375; 0.208333; 0.0416667; 0.0416667]
P :=
    for i ∈ 0 .. n
        P[i] ← (λ^i*tau^i)*e^(-λ*tau)/i!
    return P
P = [
    0.457833; 0.357682; 0.13972; 0.0363853; 0.00710651; 0.00111039; 0.000144582; 1.61364e-5; 1.57582e-6; 1.3679e-7
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]
