λ := 1.71
t := 0.34
Δt := 1
L := 10
p := [1; 0; 0; 0; 0]
μ := 1/t = 2.94118
D(t, p) := [
    -λ*p[0] + μ*p[1];
    -1*(λ + μ)*p[1] + λ*p[0] + 2*μ*p[2];
    -1*(λ + 2*μ)*p[2] + λ*p[1] + 3*μ*p[3];
    -1*(λ + 3*μ)*p[3] + λ*p[2] + 4*μ*p[4];
    -4*μ*p[4] + λ*p[3]
]
z := Rkadapt(p, 0, L*Δt, L, D) = [
    0, 1, 0, 0, 0, 0;
    1, 0.576603, 0.317567, 0.0874984, 0.0160948, 0.0022372;
    2, 0.560188, 0.324801, 0.0941733, 0.0181961, 0.00264217;
    3, 0.559352, 0.325161, 0.0945121, 0.0183132, 0.00266187;
    4, 0.55931, 0.325174, 0.0945401, 0.0183095, 0.00266633;
    5, 0.559307, 0.325181, 0.0945304, 0.0183195, 0.00266294;
    6, 0.559307, 0.325179, 0.0945344, 0.0183159, 0.00266423;
    7, 0.559307, 0.32518, 0.094532, 0.0183181, 0.00266344;
    8, 0.559307, 0.32518, 0.0945306, 0.0183194, 0.00266298;
    9, 0.559307, 0.325177, 0.0945369, 0.0183137, 0.00266503;
    10, 0.559307, 0.32518, 0.0945308, 0.0183192, 0.00266305
]
k := 0 .. 10
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S :=
    for i ∈ 0 .. L
        S[i] ← sum(z[i, k], k = 1 .. 5)
    return S
    = [1; 1; 1; 1; 1; 1; 1; 1; 1; 1; 1]
ρ := λ/μ = 0.5814
P[0] := sum(ρ^k/k!, k = 0 .. 5)^-1 = 0.559133
P :=
    for k ∈ 1 .. 4
        P[k] ← ρ^k*P[0]/k!
    return P
    = [0.559133; 0.32508; 0.0945008; 0.0183143; 0.00266198]
S := sum(P[i], i = 0 .. 4) = 0.99969
Potk := P[4] = 0.00266198
Pobsl := 1 - P[4] = 0.997338
Q := λ*(1 - P[4]) = 1.70545
q := Q/λ = 0.997338
k := ρ*(1 - P[4]) = 0.579852
