λ := 5.09
to := 0.20
t := 0.46
n := 4
μ := 1/t = 2.17391
ρ := λ/μ = 2.3414
v := 1/to = 5
b := v/μ = 2.3
P[0] := (sum(ρ^k/k!, k = 0 .. n) + ρ^n/n!*sum(ρ^l/product(n + m*b, m = 1 .. l), l = 1 .. 10))^-1
P :=
    for k ∈ 1 .. n
        P[k] ← ρ^k*P[0]/k!
    return P
P :=
    for i ∈ n + 1 .. 10
        P[i] ← ρ^i*P[0]/n!*product(n + m*b, m = 1 .. i - n)^-1
    return P
    = [0.0990193; 0.231844; 0.27142; 0.211834; 0.123997; 0.0460836; 0.0125465; 0.00269509; 0.000478051; 7.22135e-5; 9.49891e-6]
Potk := (b/ρ)*(ρ^n/n!)*sum(l*ρ^l/product(n + m*b, m = 1 .. l), l = 1 .. 10)/(sum(ρ^k/k!, k = 0 .. n) + ρ^n/n!*sum(ρ^l/product(n + m*b, m = 1 .. l), l = 1 .. 10)) = 0.0801581
Pob := 1 - Potk = 0.919842
Noch := ρ^n/n!*P[0]*sum(l*ρ^l/product(n + m*b, m = 1 .. l), l = 1 .. 10) = 0.0816009
Q := λ - v*Noch = 4.682
q := Q/λ = 0.919842
Nkan := Q/μ = 2.15372
S := sum(P[k], k = 0 .. 10) = 0.999999
________________________________________________
P[0] := (sum(ρ^k/k!, k = 0 .. n) + ρ^(n + 1)/(n!*(n - ρ)))^-1 = 0.0889536
P :=
    for k ∈ 1 .. n
        P[k] ← ρ^k*P[0]/k!
    return P
P :=
    for i ∈ n + 1 .. 10
        P[i] ← ρ^i*P[0]/(n!*n^(i - n))
    return P
    = [0.0889536; 0.208276; 0.243829; 0.1903; 0.111392; 0.0652034; 0.0381668; 0.022341; 0.0130773; 0.00765478; 0.00448073]
S := sum(P[k], k = 0 .. 10) = 0.993675
Potk := 0
Pob := 1
Q := λ = 5.09
q := 1
Noch := ρ^(n + 1)/(n*n!)*(1 - ρ/n)^-2*P[0] = 0.379234
Nkan := Q/μ = 2.3414
Nsist := Noch + ρ = 2.72063
Tsist := Nsist/λ = 0.534506
Toch := Noch/λ = 0.0745057
