λ := 4.71
Δt := 1
tob := 0.46
n := 4
L := 10
m := 4
μ := 1/tob = 2.17391
p := [1; 0; 0; 0; 0; 0; 0; 0; 0]
ρ := λ/μ = 2.1666
D(t, p) := [
    -λ*p[0] + μ*p[1];
    λ*p[0] - (λ + μ)*p[1] + 2*μ*p[2];
    λ*p[1] - (λ + 2*μ)*p[2] + 3*μ*p[3];
    λ*p[2] - (λ + 3*μ)*p[3] + 4*μ*p[4];
    λ*p[3] - (λ + 4*μ)*p[4] + 4*μ*p[5];
    λ*p[4] - (λ + 4*μ)*p[5] + 4*μ*p[6];
    λ*p[5] - (λ + 4*μ)*p[6] + 4*μ*p[7];
    λ*p[6] - (λ + 4*μ)*p[7] + 4*μ*p[8];
    λ*p[7] - 4*μ*p[8]
]
z := Rkadapt(p, 0, L*Δt, L, D) = [
    0, 1, 0, 0, 0, 0, 0, 0, 0, 0;
    1, 0.146279, 0.280134, 0.26757, 0.169136, 0.0788132, 0.034818, 0.0146762, 0.00599836, 0.0025748;
    2, 0.115331, 0.245525, 0.260899, 0.184264, 0.0970818, 0.0505162, 0.0260434, 0.0133742, 0.00696464;
    3, 0.110811, 0.239263, 0.258199, 0.185609, 0.0999639, 0.053675, 0.0287812, 0.0154129, 0.00828447;
    4, 0.109912, 0.23796, 0.257577, 0.185824, 0.100548, 0.0543401, 0.029385, 0.0158685, 0.00858503;
    5, 0.10972, 0.237682, 0.257437, 0.185879, 0.100657, 0.0544968, 0.0295061, 0.0159726, 0.00864896;
    6, 0.109679, 0.237619, 0.257419, 0.185862, 0.10072, 0.0544958, 0.0295566, 0.0159821, 0.00866659;
    7, 0.10967, 0.237609, 0.257403, 0.185886, 0.100696, 0.054529, 0.0295441, 0.0159966, 0.00866673;
    8, 0.109668, 0.237606, 0.257401, 0.185888, 0.100696, 0.0545315, 0.0295447, 0.015998, 0.00866727;
    9, 0.109668, 0.237605, 0.257401, 0.185887, 0.100697, 0.054531, 0.0295455, 0.0159979, 0.00866751;
    10, 0.109668, 0.237605, 0.257401, 0.185888, 0.100696, 0.0545318, 0.029545, 0.0159983, 0.00866745
]
Sum :=
    for i ∈ 0 .. L
        S[i] ← sum(z[i, k], k = 1 .. 9)
    return S
    = [1; 1; 1; 1; 1; 1; 1; 1; 1; 1; 1]
P[0] := (sum(ρ^k/k!, k = 0 .. n) + ρ^n/n!*sum((ρ/n)^l, l = 1 .. m))^-1
P :=
    for k ∈ 1 .. n
        P[k] ← ρ^k*P[0]/k!
    return P
P :=
    for k ∈ n + 1 .. n + m
        P[k] ← ρ^n/n!*(ρ/n)^(k - n)*P[0]
    return P
    = [0.109668; 0.237606; 0.257398; 0.185893; 0.100689; 0.0545382; 0.0295406; 0.0160007; 0.00866676]
S := sum(P[k], k = 0 .. n + m) = 1
Potk := P[n + m] = 0.00866676
Pobsl := 1 - Potk = 0.991333
Q := λ*(1 - P[n + m]) = 4.66918
q := 1 - P[n + m] = 0.991333
Noch := ρ^(n + 1)/(n*n!)*((1 - (m + 1)*(ρ/n)^m + m*(ρ/n)^(m + 1))/(1 - ρ/n)^2)*P[0] = 0.196288
Nkan := ρ*(1 - P[n + m]) = 2.14782
Nsist := Noch + Nkan = 2.34411
Tsist := Nsist/λ = 0.497688
Toch := Noch/λ = 0.0416748
