N := 1
n := N + 1 = 2
m := (N + 1)*(N + 5) = 12
λ := 1.268*10^-1 = 0.1268
R := rnd(1) = 0.193323
tob := 1 + R = 1.19332
μ := 1/tob = 0.837996
ρ := λ/μ = 0.151313
P[0] := (sum(m!*ρ^k/(k!*(m - k)!), k = 0 .. n) + sum(m!*ρ^k/(n!*n^(k - n)*(m - k)!), k = n + 1 .. m))^-1 = 0.140021
P :=
    for k ∈ 1 .. n
        P[k] ← m!*ρ^k*P[0]/(k!*(m - k)!)
    return P
    = [0.140021; 0.254244; 0.211588]
P :=
    for k ∈ n + 1 .. m
        P[k] ← m!*ρ^k*P[0]/(n!*n^(k - n)*(m - k)!)
    return P
    = [0.140021; 0.254244; 0.211588; 0.16008; 0.109; 0.0659728; 0.034939; 0.0158602; 0.00599966; 0.00181566; 0.000412099; 6.23562e-5; 4.71766e-6]
Noch := sum((k - n)*P[k], k = n .. m) = 0.847669
Nkan := n - sum((n - k)*P[k], k = 0 .. n - 1) = 1.46571
Nsis := sum(k*P[k], k = 1 .. m) = 2.31338
Q := Nkan*μ = 1.22826
q := 1
toch := (Nsis/(λ*(m - Nsis))) - 1/μ = 0.690137
Kprz := Noch/m = 0.0706391
Kprk := Nkan/n = 0.732857
Kisp := 1 + Nsis/m = 1.19278
λ := 1.268*10^-3
R := 0.193
tob := 1 + R = 1.193
μ := 1/tob = 0.838223
ρ := λ/μ = 0.00151272
a := m/n = 6
P[0] := (sum(a!*ρ^k/(k!*(a - k)!), k = 0 .. n) + sum(a!*ρ^k/(n!*n^(k - n)*(a - k)!), k = n + 1 .. a))^-1 = 0.990971
P :=
    for k ∈ 1 .. n
        P[k] ← a!*ρ^k*P[0]/(k!*(a - k)!)
    return P
P :=
    for k ∈ n + 1 .. a
        P[k] ← a!*ρ^k*P[0]/(n!*n^(k - n)*(a - k)!)
    return P
    = [0.990971; 0.0089944; 3.40151e-5; 1.02911e-7; 2.33514e-10; 3.53242e-13; 0; 0.0158602; 0.00599966; 0.00181566; 0.000412099; 6.23562e-5; 4.71766e-6]
Noch := sum((k - n)*P[k], k = n .. a) = 1.03379e-7
Nkan := n - sum((n - k)*P[k], k = 0 .. n - 1) = 0.00906263
Nsis := sum(k*P[k], k = 1 .. a) = 0.00906274
Q := Nkan*μ = 0.00759651
q := 1
toch := (Nsis/(λ*(a - Nsis))) - 1/μ = 1.36088e-5
Kprz := Noch/a = 1.72298e-8
Kprk := Nkan/a = 0.00151044
Kisp := 1 + Nsis/a = 1.00151
