ORIGIN := 1
a := [3, 1; 1, 2; 1, 6]
b := [9; 8; 11]
f := [4; 6]  # Исходные данные задачи
Z(x) := sum(f[j]*x[j], j = 1 .. 2)  # Целевая функция
x[2] := 0  # Начальные значения неизвестны
Given
a*x ≥ b  # Система ограничений
x ≥ 0
x[2] ≤ 5
x := Minimize(Z, x)  # Оптимальное решение
x = [2; 3]
Z(x) = 26  # Экстремум ЦФ
